<Lems description="Kuramoto Base type of any cell/population which has a (dimensionless) rate _R.">

    <ComponentType name="derivatives">

        <!-- Parameters will be assumed to be swept. sweep data will be matched by order of entry -->
        <Parameter name="global_speed" dimension='float'/>
        <Parameter name="global_coupling" dimension='float'/>

        <DerivedParameter name="rec_n" value="1.0f / n_node"/>
        <DerivedParameter name="rec_speed_dt" value="1.0f / global_speed / (dt)"/>
        <DerivedParameter name="nsig" value="sqrt(dt) * sqrt(2.0 * 1e-5)"/>

        <Constant name="omega" value="60.0 * 2.0 * M_PI_F / 1e3" dimension=""  description="sets the base line frequency for the Kuramoto oscillator in [rad/ms]"/>

        <Exposure name="V" dimension="sin(V)" />

        <Dynamics>
            <!-- Use PI to select the PI wrapper (ie Kuramoto) -->
            <StateVariable name="V" dimension="-2, 1" exposure="PI"/>

            <TimeDerivative variable="dV" value="omega + c_0"/>
        </Dynamics>

    </ComponentType>

    <ComponentType name="coupling_function">

<!--        variables for pre synaptic function-->
        <Parameter name="V_j" dimension='0'/>
        <DerivedParameter name="c_0" value="global_coupling * rec_n"/>

        <Constant name="a" value="1" dimension="" description="Rescales the connection strength."/>

<!--        variables for post synaptic function-->
<!--        <Requirement name="wij" dimension=''/>-->
        <Dynamics>
            <DerivedVariable name="pre" value="sin(V_j - V)"/>
            <DerivedVariable name="post" value="a"/>
        </Dynamics>

        <!-- Handle local coupling result, full expression is c_0 *= 'value'. Name option is hardcoded -->

    </ComponentType>

    <!-- If noise needs to be present, just specify the component type. Detail might be added later -->
    <ComponentType name="noise" description="on">
    </ComponentType>

</Lems>
